// SBML level 2 version 1

model SIRModel3()
  // SIR Model 3

  // Compartments:
  compartment World = 1;

  // Species:
  species S in World = 20;
  species L in World = 0;
  species I in World = 10;
  species R in World = 0;

  // Parameters:
  death = 0.01;
  recovery = 0.01;
  infection = 0.01;
  birth = 1;
  transition = 0.1;

  // Reactions:
  Birth: => S; World*birth;
  susDeath: S => ; World*S*death;
  latentDeath: L => ; World*L*death;
  infectedDeath: I => ; World*I*death;
  recoveredDeath: R => ; World*R*death;
  Infection: S => L; World*infection*S*I;
  transitionFromLatencyToInfective: L => I; World*transition*L;
  Recovery: I => R; World*recovery*I;
end
