// SBML level 2 version 1

model SIRModel4()
  // SIR Model 4

  // Compartments:
  compartment World = 1;

  // Species:
  species S in World = 20;
  species I in World = 10;
  species R in World = 0;

  // Parameters:
  death = 0.01;
  recovery = 0.01;
  infection = 0.01;
  birth = 1;
  reSusceptible = 0.1;

  // Reactions:
  Birth: => S; World*birth;
  susDeath: S => ; World*S*death;
  infectedDeath: I => ; World*I*death;
  recoveredDeath: R => ; World*R*death;
  Infection: S => I; World*infection*S*I;
  Recovery: I => R; World*recovery*I;
  RecoveredToSusceptible: R => S; World*reSusceptible*R;
end
