// SBML level 2 version 4

function Constant_flux_irreversible(v)
  v;
end
Constant_flux_irreversible is "Constant flux (irreversible)";

function logistic_death(x, d1, d2)
  x*(d1 - d2*x);
end

model Model_1()
  // logistic growth

  // Compartments:
  compartment compartment_1 = 1;

  // Species:
  species X in compartment_1 = 0;
  species $Y in compartment_1 = 1;

  // Parameters:
  b = 1;
  d1 = 0.1;
  d2 = 0.1;

  // Reactions:
  birth: X => 2 X; compartment_1*Constant_flux_irreversible(b);
  death: X => ; compartment_1*logistic_death(X, d1, d2);

  // Unit definitions:
  unit volume = dimensionless;
  unit substance = item;
end
