// SBML level 2 version 4

function Rate_Law(k, A_active, B_inactive, K)
  k*A_active*B_inactive/(B_inactive + K);
end

model Model_1()
  // three_nodes

  // Compartments:
  compartment main = 1;

  // Species:
  species $I in main = 0.5;
  species A_active in main = 0;
  species $A_inactive in main;
  species B_active in main = 0;
  species $B_inactive in main;
  species C_active in main = 0;
  species $C_inactive in main;
  species $F_B in main = 0.5;
  species $F_C in main = 0.5;

  // Parameters:
  kf_AB = 1;
  Kf_AB = 10;
  kf_AC = 1;
  Kf_AC = 10;
  kr_BA = 1;
  Kr_BA = 10;
  k_FB = 1;
  K_FB = 10;
  k_FC = 1;
  K_FC = 10;
  k_IA = 1;
  K_IA = 10;

  // Assignment rules:
  B_inactive := 1 - B_active;
  C_inactive := 1 - C_active;
  A_inactive := 1 - A_active;

  // Reactions:
  A_B: $B_inactive => B_active; main*Rate_Law(kf_AB, A_active, B_inactive, Kf_AB); A_B is "A->B";  // modifiers: A_active
  A_C: $C_inactive => C_active; main*Rate_Law(kf_AC, A_active, C_inactive, Kf_AC); A_C is "A->C";  // modifiers: A_active
  B_A: A_active => $A_inactive; main*Rate_Law(kr_BA, B_active, A_active, Kr_BA); B_A is "B-|A";  // modifiers: B_active
  FB_B: B_active => $B_inactive; main*Rate_Law(k_FB, F_B, B_active, K_FB); FB_B is "FB-|B";  // modifiers: F_B
  FC_C: C_active => $C_inactive; main*Rate_Law(k_FC, F_C, C_active, K_FC); FC_C is "FC-|C";  // modifiers: F_C
  I_A: $A_inactive => A_active; main*Rate_Law(k_IA, I, A_inactive, K_IA); I_A is "I->A";  // modifiers: I

  // Events:
  Step: at (time >= 100): I = 0.6;

  // Unit definitions:
  unit volume = 1e-3 litre;
  unit substance = 1e-3 mole;
end
