// SBML level 2 version 4

function Rate_Law(k, A_active, B_inactive, K)
  k*A_active*B_inactive/(B_inactive + K);
end

model Model_1()
  // three_nodes

  // Compartments:
  compartment main = 1;

  // Species:
  species $I in main = 0.5;
  species A_active in main = 0;
  species $A_inactive in main;
  species B_active in main = 0;
  species $B_inactive in main;
  species C_active in main = 0;
  species $C_inactive in main;
  species $E_C in main = 0.5;
  species $F_A in main = 0.5;
  species $F_B in main = 0.5;

  // Parameters:
  kr_AC = 1;
  Kr_AC = 10;
  kf_BA = 1;
  Kf_BA = 10;
  kf_CB = 1;
  Kf_CB = 10;
  k_EC = 1;
  K_EC = 10;
  k_FA = 1;
  K_FA = 10;
  k_FB = 1;
  K_FB = 10;
  k_IA = 1;
  K_IA = 10;

  // Assignment rules:
  A_inactive := 1 - A_active;
  C_inactive := 1 - C_active;
  B_inactive := 1 - B_active;

  // Reactions:
  A_C: C_active => $C_inactive; main*Rate_Law(kr_AC, A_active, C_active, Kr_AC); A_C is "A-|C";  // modifiers: A_active
  B_A: $A_inactive => A_active; main*Rate_Law(kf_BA, B_active, A_inactive, Kf_BA); B_A is "B->A";  // modifiers: B_active
  C_B: $B_inactive => B_active; main*Rate_Law(kf_CB, C_active, B_inactive, Kf_CB); C_B is "C->B";  // modifiers: C_active
  EC_C: $C_inactive => C_active; main*Rate_Law(k_EC, E_C, C_inactive, K_EC); EC_C is "EC->C";  // modifiers: E_C
  FA_A: A_active => $A_inactive; main*Rate_Law(k_FA, F_A, A_active, K_FA); FA_A is "FA-|A";  // modifiers: F_A
  FB_B: B_active => $B_inactive; main*Rate_Law(k_FB, F_B, B_active, K_FB); FB_B is "FB-|B";  // modifiers: F_B
  I_A: $A_inactive => A_active; main*Rate_Law(k_IA, I, A_inactive, K_IA); I_A is "I->A";  // modifiers: I

  // Events:
  Step: at (time >= 100): I = 0.6;

  // Unit definitions:
  unit volume = 1e-3 litre;
  unit substance = 1e-3 mole;
end
